#2D Diamond

dimension 3
units metal
processors * * 1
boundary p p p
neighbor 0.3 bin
neigh_modify every 1 delay 0 check yes

#define variables
variable T equal 300.0
variable V equal lx*ly*6.7  # 3.35 (1st layer) + gap (0) + 3.35 (2nd layer)
variable dt equal 0.0001

#lattice
atom_style atomic
read_data 2D_diamond_aa_2layers_10x10.data

#define interatomic potentials
pair_style			airebo 3 1 0
pair_coeff 			* * CH.airebo C C H

dump equil all xyz 1000 equilibration.xyz
dump_modify equil sort id

#define thermo variable settings
timestep ${dt}

#### BOND FORMATION ####

group atom1 id 	2 4 6 8 10 12 14 16 18 20 22 24 26 28 30 32 34 36 38 40 42 44 46 48 50 52 54 56 58 60 62 64 66 68 70 72 74 76 78 80 82 84 86 88 90 92 94 96 98 100 102 104 106 108 110 112 114 116 118 120 122 124 126 128 130 132 134 136 138 140 142 144 146 148 150 152 154 156 158 160 162 164 166 168 170 172 174 176 178 180 182 184 186 188 190 192 194 196 198 200 202 204 206 208 210 212 214 216 218 220 222 224 226 228 230 232 234 236 238 240 242 244 246 248 250 252 254 256 258 260 262 264 266 268 270 272 274 276 278 280 282 284 286 288 290 292 294 296 298 300 302 304 306 308 310 312 314 316 318 3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

group atom2 id 	4034 4036 4038 4040 4042 4044 4046 4048 4050 4052 4054 4056 4058 4060 4062 4064 4066 4068 4070 4072 4074 4076 4078 4080 4082 4084 4086 4088 4090 4092 4094 4096 4098 4100 4102 4104 4106 4108 4110 4112 4114 4116 4118 4120 4122 4124 4126 4128 4130 4132 4134 4136 4138 4140 4142 4144 4146 4148 4150 4152 4154 4156 4158 4160 4162 4164 4166 4168 4170 4172 4174 4176 4178 4180 4182 4184 4186 4188 4190 4192 4194 4196 4198 4200 4202 4204 4206 4208 4210 4212 4214 4216 4218 4220 4222 4224 4226 4228 4230 4232 4234 4236 4238 4240 4242 4244 4246 4248 4250 4252 4254 4256 4258 4260 4262 4264 4266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

displace_atoms atom1 move 0 0 1.15 units box
displace_atoms atom2 move 0 0 -1.15 units box

run 2000

group bonded union atom1 atom2
group nonbonded subtract all bonded

thermo_style  custom step time temp press pxx pyy pzz pe ke etotal
thermo    1000

# ======= minimization =======

min_style cg
minimize  1e-10 1e-10 200000 400000

write_data post_mini.data

# ======= equilibration =======

fix 2 all recenter INIT INIT INIT

fix 1 nonbonded npt temp $T $T 0.1 x 0.0 0.0 1.0 y 0.0 0.0 1.0 couple xy
run 150000
unfix 1

fix 1 all npt temp $T $T 0.1 x 0.0 0.0 1.0 y 0.0 0.0 1.0 couple xy
run 200000
unfix 1
unfix 2

write_data post_equil.data
