#Bilayer Graphene

dimension 3
units metal
processors * * 1
boundary p p p
neighbor 0.3 bin
neigh_modify every 1 delay 0 check yes
#define variables

variable T equal 300.0
variable V equal lx*ly*6.7  # 3.35 (1st layer) + gap (0) + 3.35 (2nd layer)
variable dt equal 0.0001
#define lattice

atom_style atomic
read_data 2D_diamond_ab_2layers_15x15.data
#define interatomic potentials

pair_style			airebo 3 1 0
pair_coeff 			* * CH.airebo C C H

dump 1 all xyz 1000 equil.xyz
dump_modify 1 sort id

#define thermo variable settings

timestep ${dt}

#### BOND FORMATION ####

group atom1 id 	3 7 11 15 19 23 27 31 35 39 43 47 51 55 59 63 67 71 75 79 83 87 91 95 99 103 107 111 115 119 123 127 131 135 139 143 147 151 155 159 163 167 171 175 179 183 187 191 195 199 203 207 211 215 219 223 227 231 235 239 243 247 249 251 253 255 257 259 261 263 265 267 269 271 273 275 277 279 281 283 285 287 289 291 293 295 297 299 301 303 305 307 309 311 313 315 317 319 321 323 325 327 329 331 333 335 337 339 341 343 345 347 349 351 353 355 357 359 361 363 365 367 369 371 373 375 377 379 381 383 385 387 389 391 393 395 397 399 401 403 405 407 409 411 413 415 417 419 421 423 425 427 429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

group atom2 id 	8930 8934 8938 8942 8946 8950 8954 8958 8962 8966 8970 8974 8978 8982 8986 8990 8994 8998 9002 9006 9010 9014 9018 9022 9026 9030 9034 9038 9042 9046 9050 9054 9058 9062 9066 9070 9074 9078 9082 9086 9090 9094 9098 9102 9106 9110 9114 9118 9122 9126 9130 9134 9138 9142 9146 9150 9154 9158 9162 9166 9170 9174 8932 9178 8936 9182 8940 9186 8944 9190 8948 9194 8952 9198 8956 9202 8960 9206 8964 9210 8968 9214 8972 9218 8976 9222 8980 9226 8984 9230 8988 9234 8992 9238 8996 9242 9000 9246 9004 9250 9008 9254 9012 9258 9016 9262 9020 9266 9024 9270 9028 9274 9032 9278 9036 9282 9040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

displace_atoms atom1 move 0 0 1.15 units box
displace_atoms atom2 move 0 0 -1.15 units box

group bonded union atom1 atom2
group nonbonded subtract all bonded

run 2000

thermo_style    	custom step time temp press pxx pyy pzz pe ke etotal
thermo          	1000

# ======= minimization =======

min_style		cg
minimize		1e-10 1e-10 200000 400000

write_data post_cg.data

fix 2 all recenter INIT INIT INIT

fix 1 nonbonded npt temp $T $T 0.1 x 0.0 0.0 1.0 y 0.0 0.0 1.0 couple xy
run 100000
unfix 1

fix 1 all npt temp $T $T 0.1 x 0.0 0.0 1.0 y 0.0 0.0 1.0 couple xy
run 100000
unfix 1
unfix 2
write_data post_equil.data
